u_adc := 5 V
adc_v := 156
adc_i := 809
r_1 := 996 Ω
r_sh := 10 Ω
r_2 := 149.9 Ω
k_op := 20
k := (r_1 + r_2)/r_2 = 7.64443
u_in := adc_v/1024*u_adc*(r_1 + r_2)/r_2 = 5.82291 V
i_in := adc_i/1024*u_adc/(k_op*r_sh) = 19.751 mA
i_multi := u_adc/(1024*k_op*r_sh) = 0.0244141 mA
u_multi := u_adc/1024*(r_1 + r_2)/r_2 = 0.0373263 V
