# Расчеты для измерения тока  ZXCT1010
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I_max := 0.1 A
I_min := 0.1 mA
V_in := 3.3*V
R_s := 0.6 Ω
k := 100
V_sense := R_s*I_max = 60 mV
P_D := I_max^2*R_s = 6 mW
V_outmax := k*R_s*I_max = 6 V
V_outmin := k*R_s*I_min = 6 mV
V_adc := V_outmax/1024 = 5.85938 mV
i := 5*V/(k*R_s) = 0.0833333 A
V := 8*mA*k*R_s = 480 mV
