v_in := 12 V
r_1 := [10 kΩ, 1 kΩ, 100 Ω, 10 Ω, 1 Ω, 0.1 Ω]
r_2 := 12 Ω
r := r_1 + r_2 = [10012, 1012, 112, 22, 13, 12.1] Ω
i := v_in/r = [1.19856, 11.8577, 107.143, 545.455, 923.077, 991.736] mA
v_r := v_in*r_1/r = [11.9856, 11.8577, 10.7143, 5.45455, 0.923077, 0.0991736] V
p := vectorize(v_r*i) = [0.0143655, 0.140605, 1.14796, 2.97521, 0.852071, 0.0983539] W
